# OpenSim document version 40000
ForwardTool JJD_right_knee:
  replace_force_set: false
  results_directory: Fwd arnold
  output_precision: 8
  initial_time: 0
  final_time: 0.5
  solve_for_equilibrium_for_auxiliary_states: false
  maximum_number_of_integrator_steps: 20000
  maximum_integrator_step_size: 1
  minimum_integrator_step_size: 1e-8
  integrator_error_tolerance: 1e-5
  use_specified_dt: false
  AnalysisSet Analyses:
    Kinematics: start_time=0 end_time=0.5 step_interval=1 in_degrees=true
  ControllerSet Controllers:
    ControlSetController: controls_file=muscle_controls.xml
