# OpenSim document version 40000
Model heavytib_arnold_style:
  gravity: 0 -9.80665 0
  length_units: meters
  force_units: N
  credits:
    Rajagopal2016 LaiArnold2017 Model w/ updated wrapping surfaces, modified for movements involving high hip flexion
  publications:
    Catelli, DS; Wesseling, M; Jonkers, I; Lamontagne, M. A Musculoskeletal Model Customized for Squatting Task. Computer Methods in Biomechanics and Biomedical Engineering, in press (2018)
  Ground
  BodySet:
    Body pelvis: mass=11.777 [kg] mass_center=(-0.0707 0 0) inertia=(0.1028 0.0871 0.0579 0 0 0)
        meshes=(r_pelvis.vtp l_pelvis.vtp sacrum.vtp)
    Body femur_r: mass=9.3014 mass_center=(0 -0.17 0) inertia=(0.1339 0.0351 0.1412 0 0 0) meshes=femur_r.vtp
      WrapCylinder KnExt_at_fem_r: xyz_body_rotation=(-0.0623366 0.0507601 0)
          translation=(-0.0019 -0.402732 0.00209111) quadrant=all radius=0.03 length=0.1
    Body tibia_r: mass=15 mass_center=(0 -0.1867 0) inertia=(0.504 0.051 0.511 0 0 0) meshes=(tibia_r.vtp r_fibula.vtp)
    Body patella_r: mass=0.0862 mass_center=(0.0018 0.0264 0) inertia=(2.87e-6 1.311e-5 1.311e-5 0 0 0)
        meshes=r_patella.vtp
  JointSet:
    CustomJoint ground_pelvis: socket_parent_frame=ground_offset socket_child_frame=pelvis_offset
      Coordinate pelvis_tilt: default_value=0 range=(-1.570796 1.570796) clamped=true locked=true
      Coordinate pelvis_list: default_value=0 range=(-1.570796 1.570796) clamped=true locked=true
      Coordinate pelvis_rotation: default_value=0 range=(-1.570796 1.570796) clamped=true locked=true
      Coordinate pelvis_tx: default_value=0 range=(-5 5) clamped=true locked=true
      Coordinate pelvis_ty: default_value=1 range=(-1 2) clamped=true locked=true
      Coordinate pelvis_tz: default_value=0 range=(-3 3) clamped=true locked=true
      PhysicalOffsetFrame ground_offset: socket_parent=/ground translation=(0 0 0) [meters]
      PhysicalOffsetFrame pelvis_offset: socket_parent=/bodyset/pelvis translation=(0 0 0)
      SpatialTransform:
        TransformAxis rotation1: coordinates=pelvis_tilt axis=(0 0 1) LinearFunction(coefficients=1 0)
        TransformAxis rotation2: coordinates=pelvis_list axis=(1 0 0) LinearFunction(coefficients=1 0)
        TransformAxis rotation3: coordinates=pelvis_rotation axis=(0 1 0) LinearFunction(coefficients=1 0)
        TransformAxis translation1: coordinates=pelvis_tx axis=(1 0 0) LinearFunction(coefficients=1 0)
        TransformAxis translation2: coordinates=pelvis_ty axis=(0 1 0) LinearFunction(coefficients=1 0)
        TransformAxis translation3: coordinates=pelvis_tz axis=(0 0 1) LinearFunction(coefficients=1 0)
    CustomJoint hip_r: socket_parent_frame=pelvis_offset socket_child_frame=femur_r_offset
      Coordinate hip_flexion_r: default_value=1.570796 range=(-0.5235988 2.40855) clamped=true locked=true
      Coordinate hip_adduction_r: default_value=-1.199293e-9 range=(-0.8726646 0.5235988) clamped=true locked=true
      Coordinate hip_rotation_r: default_value=0 range=(-0.6981317 0.6981317) clamped=true locked=true
      PhysicalOffsetFrame pelvis_offset: socket_parent=/bodyset/pelvis translation=(-0.056276 -0.07849 0.07726)
      PhysicalOffsetFrame femur_r_offset: socket_parent=/bodyset/femur_r translation=(0 0 0)
      SpatialTransform: axes_held_at_zero=(translation1 translation2 translation3)
        TransformAxis rotation1: coordinates=hip_flexion_r axis=(0 0 1) LinearFunction(coefficients=1 0)
        TransformAxis rotation2: coordinates=hip_adduction_r axis=(1 0 0) LinearFunction(coefficients=1 0)
        TransformAxis rotation3: coordinates=hip_rotation_r axis=(0 1 0) LinearFunction(coefficients=1 0)
    CustomJoint walker_knee_r: socket_parent_frame=femur_r_offset socket_child_frame=tibia_r_offset
      Coordinate knee_angle_r: default_value=1.5708 range=(0 2.53073) clamped=true
      PhysicalOffsetFrame femur_r_offset: socket_parent=/bodyset/femur_r translation=(-0.0045 -0.4096 -0.00175)
          orientation=(-1.64157 1.44618 1.5708) [radians]
      PhysicalOffsetFrame tibia_r_offset: socket_parent=/bodyset/tibia_r
          translation=(-0.00808954 -0.0035348 -0.00148474) orientation=(-1.64157 1.44618 1.5708)
      SpatialTransform:
        TransformAxis rotation1: coordinates=knee_angle_r axis=(1 0 0) LinearFunction(coefficients=1 0)
        TransformAxis rotation2: coordinates=knee_angle_r axis=(0 0 1)
          SimmSpline: x=(0 0.174533 0.349066 0.523599 0.698132 0.872665 1.0472 1.22173 1.39626 1.5708 1.74533 1.91986 2.0944)
              y=(0 0.0126809 0.0226969 0.0296054 0.0332049 0.0335354 0.0308779 0.0257548 0.0189295 0.011407 0.00443314 -0.00050475 -0.0016782)
        TransformAxis rotation3: coordinates=knee_angle_r axis=(0 1 0)
          SimmSpline: x=(0 0.174533 0.349066 0.523599 0.698132 0.872665 1.0472 1.22173 1.39626 1.5708 1.74533 1.91986 2.0944)
              y=(0 0.059461 0.109399 0.150618 0.18392 0.210107 0.229983 0.24435 0.254012 0.25977 0.262428 0.262788 0.261654)
        TransformAxis translation1: coordinates=knee_angle_r axis=(1 0 0)
          SimmSpline: x=(0 0.174533 0.349066 0.523599 0.698132 0.872665 1.0472 1.22173 1.39626 1.5708 1.74533 1.91986 2.0944)
              y=(0 5.3e-5 0.000188 0.000378 0.000597 0.000825 0.001045 0.001247 0.00142 0.001558 0.001661 0.001728 0.00176)
        TransformAxis translation2: coordinates=knee_angle_r axis=(0 1 0)
          SimmSpline: x=(0 0.174533 0.349066 0.523599 0.698132 0.872665 1.0472 1.22173 1.39626 1.5708 1.74533 1.91986 2.0944)
              y=(0 0.000301 0.000143 -0.000401 -0.001233 -0.002243 -0.003316 -0.004346 -0.005239 -0.005924 -0.006361 -0.006539 -0.00648)
        TransformAxis translation3: coordinates=knee_angle_r axis=(0 0 1)
          SimmSpline: x=(0 0.174533 0.349066 0.523599 0.698132 0.872665 1.0472 1.22173 1.39626 1.5708 1.74533 1.91986 2.0944)
              y=(0 0.001055 0.002061 0.00289 0.003447 0.003676 0.003559 0.00311 0.002373 0.001418 0.000329 -0.000805 -0.001898)
    CustomJoint patellofemoral_r: socket_parent_frame=femur_r_offset socket_child_frame=patella_r_offset
      Coordinate knee_angle_r_beta: default_value=4.877666e-5 range=(-99999.9 99999.9) clamped=false
      PhysicalOffsetFrame femur_r_offset: socket_parent=/bodyset/femur_r translation=(-0.00809 -0.40796 -0.00275)
      PhysicalOffsetFrame patella_r_offset: socket_parent=/bodyset/patella_r translation=(0 0 0)
      SpatialTransform: axes_held_at_zero=(rotation2 rotation3)
        TransformAxis rotation1: coordinates=knee_angle_r_beta axis=(0 0 1)
          SimmSpline: x=(0 0.174533 0.349066 0.523599 0.698132 0.872665 1.0472 1.22173 1.39626 1.5708 1.74533 1.91986 2.0944)
              y=(0.00113686 -0.00629212 -0.105582 -0.253683 -0.414245 -0.579047 -0.747244 -0.91799 -1.09044 -1.26379 -1.43763 -1.61186 -1.78634)
        TransformAxis translation1: coordinates=knee_angle_r_beta axis=(1 0 0)
          SimmSpline: x=(0 0.174533 0.349066 0.523599 0.698132 0.872665 1.0472 1.22173 1.39626 1.5708 1.74533 1.91986 2.0944)
              y=(0.0524 0.0488 0.0437 0.0371 0.0296 0.0216 0.0136 0.0057 -0.0019 -0.0088 -0.0148 -0.0196 -0.0227)
        TransformAxis translation2: coordinates=knee_angle_r_beta axis=(0 1 0)
          SimmSpline: x=(0 0.174533 0.349066 0.523599 0.698132 0.872665 1.0472 1.22173 1.39626 1.5708 1.74533 1.91986 2.0944)
              y=(-0.0108 -0.019 -0.0263 -0.0322 -0.0367 -0.0395 -0.0408 -0.0404 -0.0384 -0.0349 -0.0301 -0.0245 -0.0187)
        TransformAxis translation3: axis=(0 0 1) Constant(value=0.00275)
  ConstraintSet:
    CoordinateCouplerConstraint patellofemoral_knee_angle_r_con: independent_coordinate_names=knee_angle_r
        dependent_coordinate_name=knee_angle_r_beta scale_factor=1
        coupled_coordinates_function=LinearFunction(coefficients=1 0)
  ForceSet:
    Schutte1993Muscle_Deprecated vasint_r: max_isometric_force=1024.2 optimal_fiber_length=0.0993
        tendon_slack_length=0.106 pennation_angle_at_optimal=0.07853982 [radians] max_contraction_velocity=10
        time_scale=0.1 activation1=7.6 activation2=2.5 damping=0.05
      PathPoint P1: femur_r (0.029 -0.1924 0.031)
      PathPoint P2: femur_r (0.0335 -0.2084 0.0285)
      PathPoint P3: patella_r (0.0058 0.048 -0.0006)
      PathWrap: wrap_object=KnExt_at_fem_r method=hybrid
      tendon_force_length_curve: SimmSpline: x=(-10 -0.002 -0.001 0 0.00131 0.00281 0.00431 0.00581 0.00731 0.00881 0.0103 0.0118 0.0123 9.2 9.201 9.202 20)
          y=(0 0 0 0 0.0108 0.0257 0.0435 0.0652 0.0915 0.123 0.161 0.208 0.227 345 345 345 345)
      active_force_length_curve: SimmSpline: x=(-5.30769 -4.30769 -1.92308 -0.884615 -0.269231 0.230769 0.461538 0.52725 0.62875 0.71875 0.86125 1.045 1.2175 1.43875 1.5 1.61539 2 2.96154 3.69231 5.46154 9.9019)
          y=(0.012188 0.021899 0.036466 0.052493 0.075312 0.114158 0.157859 0.226667 0.636667 0.856667 0.95 0.993333 0.77 0.246667 0.193821 0.133252 0.072683 0.044417 0.036341 0.021899 0.007332)
      passive_force_length_curve: SimmSpline: x=(-5 0.998 0.999 1 1.1 1.2 1.3 1.4 1.5 1.6 1.601 1.602 5)
          y=(0 0 0 0 0.035 0.12 0.26 0.55 1.17 2 2 2 2)
